*SET,l,4
*SET,b,1
*SET,h,0.25
*SET,l0,1
*SET,del,0.05
*SET,d,0.51
/PREP7
ET,1,SOLID187
BLOCK,,l,,b,,h,
K,9,l0,,,
K,10,l0+del,,,
K,11,l0+del/2,d,,
K,12,l0,0,h,
K,13,l0+del,0,h,
K,14,l0+del/2,d,h,
V,9,10,11,12,13,14
VSBV,1,2
HPTCREATE,AREA,15,0,COORD,0.1,b/2,h,
HPTCREATE,AREA,15,0,COORD,l/4,b/2,h,
HPTCREATE,AREA,15,0,COORD,l/2,b/2,h,
HPTCREATE,AREA,15,0,COORD,3*l/4,b/2,h,
HPTCREATE,AREA,15,0,COORD,l-0.1,b/2,h,
MPTEMP,,,,,,,,
MPTEMP,1,0
MPDATA,EX,1,,2e10
MPDATA,PRXY,1,,0.3
ESIZE,0.1,0,
MPDATA,DENS,1,,2400
vmesh,all
dl,1,,all
dl,3,,all
/SOL
ANTYPE,2
MODOPT,LANB,5
EQSLV,SPAR
MXPAND,5, , ,0
LUMPM,0
PSTRES,0
MODOPT,LANB,5,1,100, ,OFF
solve
/POST1
SET,FIRST
*GET,F1,MODE,1,FREQ
*GET,F2,MODE,2,FREQ
*cfopen,G:\pyprojects\VKR\results\antype2\modalResult11,txt
*vwrite,F1
(f7.4)
*vwrite,F2
(f7.4)
*cfclos
